# Прямая задача
ORIGIN := 1
A := [2, 1, 1/2, 4; 1, 5, 3, 0; 3, 0, 6, 1]
b := [2400; 1200; 3000]
c := [15/2; 3; 6; 12]
f(x) := transpose(c)*x
x[1] := 0
x[2] := 0
x[3] := 0
x[4] := 0
Given
A*x ≤ b
x ≥ 0
Maximize(f, x) = [0; 0; 400; 550]
# Двойственная задача
A1 := transpose(A)
b1 := c
c1 := b
g(y) := transpose(c1)*y
y[1] := 0
y[2] := 0
y[3] := 0
Given
A1*y ≥ b1
y ≥ 0
Minimize(g, y) = [3; 1.5; 0]
Xopt := [0; 0; 400; 550]
Yopt := [3; 1.5; 0]
fopt := transpose(c)*Xopt
gopt := transpose(c1)*Yopt
fopt = 9000
gopt = 9000
L(X, Y) := transpose(Y)*A*X
L(Xopt, Yopt) = 9000
